<?xml version="1.0"?>

<!--
		References:	see Docs/references.md, Engine Rotax 912
-->

<piston_engine name="Rotax-912-A3">
	<!--	mp from aeromatic -->
	<minmp unit="INHG">		10.0	</minmp>
	<maxmp unit="INHG">	 	29.0	</maxmp>

	<!--	ref. [6] unless noted otherwise	-->
	<displacement unit="IN3">	82.6	</displacement>
	<maxhp>				100	</maxhp>	<!-- 73.5 kW -->
	<cycles>			4.0	</cycles>
	<idlerpm>			1400.0	</idlerpm>	<!-- ref. [3] p. 2-2	-->
	<maxrpm>			5800.0	</maxrpm>
	<stroke unit="IN">		2.4	</stroke>
	<bore unit="IN">		3.31	</bore>
	<cylinders>			4	</cylinders>
	<compression-ratio>		9.0	</compression-ratio>
	<cooling-factor>2</cooling-factor>
	<cylinder-head-mass unit="LBS">3.3</cylinder-head-mass>
	<!--	currently no reference	-->
	<sparkfaildrop>			0.1	</sparkfaildrop>
	<volumetric-efficiency>		0.86</volumetric-efficiency>
	<man-press-lag>			0.1	</man-press-lag>
	<static-friction  unit="HP">	0.566572</static-friction>
	<starter-torque>		90.6516	</starter-torque>
	<starter-rpm>			1400	</starter-rpm>
	<table name="COMBUSTION" type="internal">
		<tableData>
			0.00 0.980
			0.90 0.980
			1.00 0.970
			1.05 0.950
			1.10 0.800
			1.15 0.650
			1.20 0.590
			1.30 0.500
			1.40 0.430
			1.50 0.370
			1.60 0.325
			2.00 0.145

		</tableData>
		<!-- Defaults -->
		<!-- <tableData>
			0.00 0.980
			0.90 0.980
			1.00 0.970
			1.05 0.950
			1.10 0.900
			1.15 0.850
			1.20 0.790
			1.30 0.700
			1.40 0.630
			1.50 0.570
			1.60 0.525
			2.00 0.345

		</tableData> -->
	</table>
</piston_engine>
