<?xml version="1.0"?>
<aerodynamics>
   <property value="1.0">coeffs/lift-alpha</property>
   <property value="1">coeffs/prop-c</property>
   <property value="-17">coeffs/pitch-dampening</property>
   <property value="-0.5">coeffs/pitch-alpha</property>
   <property value="-0.02">coeffs/yaw-rudder</property>
   <property value="-500">coeffs/water-rudder-factor</property>
   <property value="0.0015">coeffs/drag-flap</property>
   <property value="0.01">coeffs/lift-flap</property>
   <property value="10">metrics/hull-sqft</property>
   <property value="0.5">coeffs/hull-cl</property>
   <property value="-0.01">coeffs/hull-cp</property>

   <function name="aero/function/kCDge">
      <description>Change_in_drag_due_to_ground_effect</description>
      <table>
          <independentVar>aero/h_b-mac-ft</independentVar>
          <tableData>
                0.0000    0.4800
                0.1000    0.5150
                0.1500    0.6290
                0.2000    0.7090
                0.3000    0.8150
                0.4000    0.8820
                0.5000    0.9280
                0.6000    0.9620
                0.7000    0.9880
                0.8000    1.0000
                0.9000    1.0000
                1.0000    1.0000
                1.1000    1.0000
            </tableData>
      </table>
  </function>

  <function name="aero/function/kCLge">
      <description>Change_in_lift_due_to_ground_effect</description>
      <table>
          <independentVar>aero/h_b-mac-ft</independentVar>
          <tableData>
                0.1400    1.2030
                0.1500    1.1270
                0.2000    1.0900
                0.3000    1.0730
                0.4000    1.0460
                0.5000    1.0280
                0.6000    1.0190
                0.7000    1.0130
                0.8000    1.0080
                0.9000    1.0060
                1.0000    1.0030
                1.1000    1.0020
                1.2000    1.0000
            </tableData>
      </table>
  </function>

    <axis name="LIFT">

        <function name="aero/force/Lift_alpha">
          <description>Lift due to alpha</description>
          <product>
              <property>aero/qbar-psf</property>
              <property>metrics/Sw-sqft</property>
              <property>aero/function/kCLge</property>
              <table>
               <independentVar lookup="row">aero/alpha-wing-rad</independentVar>
               <tableData>
                  -0.349  -0.538
                  -0.314  -0.566
                  -0.288  -0.627
                  -0.279  -1.129
                  -0.271  -1.156
                  -0.244  -1.084
                  -0.209  -1.004
                   0.000  0.090
                   0.070  0.484
                   0.175  1.075
                   0.244  1.406
                   0.262  1.459
                   0.279  1.498
                   0.305  1.522
                   0.314  1.485
                   0.332  1.280
                   0.349  1.020
                   0.419  0.768
                   0.611  0.576
               </tableData>
             </table>
              <property>coeffs/lift-alpha</property>
          </product>
        </function>

        <function name="aero/force/Lift_pitch_rate">
            <description>Lift due to pitch rate</description>
            <product>
              <property>aero/qbar-psf</property>
              <property>metrics/Sw-sqft</property>
              <property>velocities/q-aero-rad_sec</property>
              <property>aero/ci2vel</property>
              <value>4.0</value>
            </product>
          </function>

          <function name="aero/force/Lift_alpha_rate">
            <description>Lift due to alpha rate</description>
            <product>
               <property>aero/qbar-psf</property>
               <property>metrics/Sw-sqft</property>
               <property>aero/alphadot-rad_sec</property>
               <property>aero/ci2vel</property>
               <value> 1.2654 </value>
            </product>
          </function>

        <function name="aero/force/Lift_elevator">
           <description>Lift due to Elevator Deflection</description>
           <product>
               <property>aero/qbar-psf</property>
               <property>metrics/Sw-sqft</property>
               <property>fcs/elevator-pos-rad</property>
               <value> 0.20 </value>
           </product>
        </function>

         <function name="aero/force/Lift_flap">
           <description>Delta Lift due to flaps</description>
           <product>
               <property>aero/qbar-psf</property>
               <property>metrics/Sw-sqft</property>
               <table>
                  <independentVar lookup="row">fcs/flap-pos-deg</independentVar>
                  <tableData>
                    -5.0  -0.0350
                     0.0   0.0000
                    10.0   0.1200
                    30.0   0.3500
                  </tableData>
               </table>
           </product>
        </function>

         <function name="aero/force/Lift_hull">
           <description>Lift due to hull body</description>
           <product>
               <property>aero/qbar-psf</property>
               <property>metrics/hull-sqft</property>
               <table>
                  <independentVar lookup="row">aero/alpha-rad</independentVar>
                  <tableData>
                    -0.10   -0.1500
                     0.00    0.0100
                     0.10    0.4500
                  </tableData>
               </table>
           </product>
        </function>
      </axis>

      <axis name="DRAG">

        <!-- CD0 is based on fuselage, wing, horizontal- en vertical tail -->
        <!-- Antennas, struts and wires are not taken into account        -->
        <!-- CD for gear (fixed and retractable) is defined below         -->
        <function name="aero/force/Drag_minimum">
           <description>Minimum drag</description>
           <product>
              <property>aero/qbar-psf</property>
              <property>metrics/Sw-sqft</property>

              <value> 0.046 </value>
           </product>
        </function>

        <function name="aero/force/Drag_alpha">
           <description>Drag due to alpha</description>
           <product>
              <property>aero/qbar-psf</property>
              <property>metrics/Sw-sqft</property>
              <table>
                <independentVar lookup="row">aero/alpha-rad</independentVar>
                <tableData>
                  -1.57    1.5000
                  -0.22    0.0600
                  0.00    0.0000
                  0.22    0.0600
                  1.57    1.5000
               </tableData>

              </table>
           </product>
        </function>

        <function name="aero/force/Drag_induced">
           <description>Induced drag</description>
             <product>
               <property>aero/qbar-psf</property>
               <property>metrics/Sw-sqft</property>
               <property>aero/cl-squared</property>
               <value> 0.0402 </value>
             </product>
        </function>

        <function name="aero/force/Drag_gear">
           <description>Drag due to Landing Gear Deflection</description>
           <product>
               <property>aero/qbar-psf</property>
               <property>metrics/Sw-sqft</property>
               <property>gear/gear-pos-norm</property>
               <value> 0.0180 </value>
           </product>
        </function>

        <function name="aero/force/Drag_beta">
           <description>Drag due to sideslip</description>
           <product>
              <property>aero/qbar-psf</property>
              <property>metrics/Sw-sqft</property>
              <table>
                <independentVar lookup="row">aero/beta-rad</independentVar>
                <tableData>
                  -1.57    1.2300
                  -0.26    0.0500
                   0.00    0.0000
                   0.26    0.0500
                   1.57    1.2300
                </tableData>
              </table>
           </product>
        </function>

        <function name="aero/force/Drag_elevator">
           <description>Drag due to Elevator Deflection</description>
           <product>
               <property>aero/qbar-psf</property>
               <property>metrics/Sw-sqft</property>
               <abs><property>fcs/elevator-pos-rad</property></abs>
               <value> 0.0400 </value>
           </product>
        </function>

         <function name="aero/force/Drag_flap">
           <description>Drag due to flaps</description>
             <product>
               <property>aero/qbar-psf</property>
               <property>metrics/Sw-sqft</property>
               <table>
                  <independentVar lookup="row">fcs/flap-pos-deg</independentVar>
                  <tableData>
                    -5.0   -0.0065
                     0.0   0.0000
                    10.0   0.0150
                    30.0   0.0650
                  </tableData>
               </table>
             </product>
        </function>


        <function name="aero/force/Drag_hull">
           <description>Drag due to hull geometry and sponsons</description>
           <product>
              <property>aero/qbar-psf</property>
              <property>metrics/hull-sqft</property> <!-- Usa tus 10 sqft definidos -->
              <table>
                <independentVar lookup="row">aero/alpha-rad</independentVar>
                <tableData>
                  -0.35    0.4500  <!-- Gran resistencia si pica mucho -->
                  -0.08    0.1200  <!-- Arrastre notable a ángulos bajos de descenso -->
                   0.00    0.0500  <!-- Arrastre base del casco alineado -->
                   0.08    0.1200  <!-- Sube rápido al levantar el morro (frena en el climb) -->
                   0.35    0.5500
                </tableData>
              </table>
           </product>
        </function>


      </axis>

      <axis name="SIDE">

        <function name="aero/force/Side_beta">
           <description>Side force due to beta</description>
           <product>
               <property>aero/qbar-psf</property>
               <property>metrics/Sw-sqft</property>
               <property>aero/beta-rad</property>
               <value> -0.2583 </value>
           </product>
        </function>
        <function name="aero/force/Side_roll_rate">
           <description>Side force due to roll rate</description>
           <product>
               <property>aero/qbar-psf</property>
               <property>metrics/Sw-sqft</property>
               <property>aero/bi2vel</property>
               <property>velocities/p-aero-rad_sec</property>
               <table>
                 <independentVar lookup="row">aero/Re</independentVar>
                 <tableData>
                     1897247   0.2724
                     2086972   0.0232
                     2845871   0.0103
                     3805872   0.0058
                 </tableData>
               </table>
           </product>
        </function>

        <function name="aero/force/Side_yaw_rate">
           <description>Side force due to yaw rate</description>
           <product>
               <property>aero/qbar-psf</property>
               <property>metrics/Sw-sqft</property>
               <property>aero/bi2vel</property>
               <property>velocities/r-aero-rad_sec</property>
               <value> 0.1384 </value>
           </product>
        </function>

        <function name="aero/force/Side_rudder">
           <description>Side force due to rudder</description>
           <product>
               <property>aero/qbar-psf</property>
               <property>metrics/Sw-sqft</property>
               <property>fcs/rudder-pos-rad</property>
               <value> 0.0089 </value>
           </product>
        </function>

      </axis>

      <axis name="PITCH">

         <function name="aero/moment/Pitch_alpha">
           <description>Pitch moment due to alpha</description>
           <product>
               <property>aero/qbar-psf</property>
               <property>metrics/Sw-sqft</property>
               <property>metrics/cbarw-ft</property>
               <table>
                  <independentVar lookup="row">aero/alpha-deg</independentVar>
                  <tableData>
                    -4.0   0.0600
                     0.0   0.0060
                     4.0  -0.0600
                    12.0  -0.1800
                    20.0  -0.3000
                  </tableData>
               </table>
           </product>
        </function>

        <function name="aero/moment/Pitch_elevator">
           <description>Pitch moment due to elevator</description>
           <product>
              <property>aero/qbar-psf</property>
              <property>metrics/Sw-sqft</property>
              <property>metrics/cbarw-ft</property>
              <table>
               <independentVar lookup="row">fcs/elevator-pos-rad</independentVar>
               <tableData>
                  -0.25   0.3375
                  -0.10   0.1100
                  0.00   0.0000
                  0.10  -0.1100
                  0.25  -0.3375
               </tableData>
            </table>
           </product>
        </function>
         <function name="aero/moment/Pitch_elevator_propwash">
            <description>Momento de cabeceo extra en el elevador por flujo de la hélice</description>
            <product>
               <property>aero/qbar-psf</property>
               <property>metrics/Sw-sqft</property>
               <property>metrics/cbarw-ft</property>
               <property>fcs/elevator-pos-rad</property>
               <!-- Factor de escala: Usamos un valor negativo para que respete la dirección del elevador (- palanca atrás = nariz arriba) -->
               <value> -0.8000 </value>

               <!-- Esta tabla define cuánto sopla la hélice según el empuje actual -->
               <table>
                  <independentVar lookup="row">propulsion/engine/thrust-lbs</independentVar>
                  <tableData>
                     0.0    0.00  <!-- Motor en idle: El flujo de la hélice no aporta nada extra -->
                  150.0    0.40  <!-- Potencia parcial: Empieza a soplar la cola -->
                  320.0    1.00  <!-- Potencia máxima de despegue: Aporta el 100% del efecto extra -->
                  </tableData>
               </table>
            </product>
         </function>

        <function name="aero/moment/Pitch_damp">
           <description>Pitch moment due to pitch rate</description>
           <product>
               <property>aero/qbar-psf</property>
               <property>metrics/Sw-sqft</property>
               <property>metrics/cbarw-ft</property>
               <property>aero/ci2vel</property>
               <property>velocities/q-aero-rad_sec</property>
               <value>-17.0</value>
           </product>
        </function>

        <function name="aero/moment/Pitch_alphadot">
           <description>Pitch moment due to alpha rate</description>
           <product>
               <property>aero/qbar-psf</property>
               <property>metrics/Sw-sqft</property>
               <property>metrics/cbarw-ft</property>
               <property>aero/ci2vel</property>
               <property>aero/alphadot-rad_sec</property>
               <value> -2.9666 </value>
           </product>
        </function>


         <function name="aero/moment/Pitch_hull">
            <description>Pitch moment due to hull surface</description>
             <product>
                 <property>aero/qbar-psf</property>
                 <property>metrics/hull-sqft</property>
                 <property>metrics/cbarw-ft</property>
                 <property>aero/alpha-rad</property>
                 <property>coeffs/hull-cp</property>
             </product>
         </function>

         <function name="aero/moment/Pitch_flap">
           <description>Pitch moment due to flaps</description>
           <product>
              <property>aero/qbar-psf</property>
              <property>metrics/Sw-sqft</property>
              <property>metrics/cbarw-ft</property>
              <table>
                <independentVar lookup="row">fcs/flap-pos-deg</independentVar>
                <tableData>
                  -5.0   0.0030
                   0.0   0.0000
                  10.0  -0.0150
                  30.0  -0.0450
                </tableData>
              </table>
           </product>
        </function>


      </axis>

      <axis name="ROLL">

        <function name="aero/moment/Roll_differential_propwash">
           <description>Roll moment due to differential propwash</description>
           <product>
               <property>propulsion/engine[0]/thrust-coefficient</property>
               <property>aero/qbar-psf</property>
               <property>metrics/Sw-sqft</property>
               <property>metrics/bw-ft</property>
               <property>aero/alpha-rad</property>
               <value> 0.1320 </value>
           </product>
        </function>

        <function name="aero/moment/Roll_beta">
           <description>Roll moment due to beta</description>
           <product>
               <property>aero/qbar-psf</property>
               <property>metrics/Sw-sqft</property>
               <property>metrics/bw-ft</property>
               <property>aero/beta-rad</property>
               <!-- <property>fcs/gear-no-wow</property> -->
               <table>
                 <independentVar lookup="row">aero/alpha-rad</independentVar>
                 <independentVar lookup="column">aero/Re</independentVar>
                 <tableData>
                              1897247  2086972  2845871  3805872
                     -0.0349  -0.3960  -0.0730  -0.0562  -0.0503
                      0.3491  -0.3960  -0.0730  -0.0562  -0.0503
                 </tableData>
               </table>
           </product>
        </function>

        <function name="aero/moment/Roll_damp">
           <description>Roll moment due to roll rate</description>
           <product>
               <property>aero/qbar-psf</property>
               <property>metrics/Sw-sqft</property>
               <property>metrics/bw-ft</property>
               <property>aero/bi2vel</property>
               <property>velocities/p-aero-rad_sec</property>
               <value> -0.6823 </value>
           </product>
        </function>

        <function name="aero/moment/Roll_yaw">
           <description>Roll moment due to yaw rate</description>
           <product>
               <property>aero/qbar-psf</property>
               <property>metrics/Sw-sqft</property>
               <property>metrics/bw-ft</property>
               <property>aero/bi2vel</property>
               <property>velocities/r-aero-rad_sec</property>
               <table>
                 <independentVar lookup="row">aero/alpha-rad</independentVar>
                 <independentVar lookup="column">aero/Re</independentVar>
                 <tableData>
                              1897247  2086972  2845871  3805872
                     -0.0349   0.0273   0.0273   0.0273   0.0273
                      0.3491   3.7181   0.5479   0.5479   0.5479
                 </tableData>
               </table>
           </product>
        </function>

        <function name="aero/moment/Roll_aileron">
           <description>Roll moment due to aileron</description>
           <product>
              <property>aero/qbar-psf</property>
              <property>metrics/Sw-sqft</property>
              <property>metrics/bw-ft</property>
              <property>fcs/left-aileron-pos-rad</property>
               <table>
                <independentVar lookup="row">velocities/mach</independentVar>
                <tableData>
                  0.0    0.1700
                  2.0    0.0425
                </tableData>
              </table>
           </product>
        </function>

        <function name="aero/moment/Roll_rudder">
           <description>Roll moment due to rudder</description>
           <product>
               <property>aero/qbar-psf</property>
               <property>metrics/Sw-sqft</property>
               <property>metrics/bw-ft</property>
               <property>fcs/rudder-pos-rad</property>
               <value> 0.0100 </value>
           </product>
        </function>

      </axis>

      <axis name="YAW">

        <!-- Stall initiator -->
        <!-- <function name="aero/moment/Yaw_alpha">
           <description>Yaw moment due to alpha</description>
           <product>
               <property>aero/qbar-psf</property>
               <property>metrics/Sw-sqft</property>
               <property>metrics/bw-ft</property>
               <property>aero/alpha-rad</property>
               <table>
                 <independentVar lookup="row">aero/beta-rad</independentVar>
                 <independentVar lookup="column">aero/Re</independentVar>
                 <tableData>
                              1897247  2086972
                     -0.3491  -1.0000   0.0000
                      0.3491   1.0000   0.0000
                 </tableData>
               </table>
           </product>
        </function> -->

        <function name="aero/moment/Yaw_beta">
           <description>Yaw moment due to beta</description>
           <product>
               <property>aero/qbar-psf</property>
               <property>metrics/Sw-sqft</property>
               <property>metrics/bw-ft</property>
               <property>aero/beta-rad</property>
               <value> 0.0332 </value>
           </product>
        </function>

        <function name="aero/moment/Yaw_roll_rate">
           <description>Yaw moment due to roll rate</description>
           <product>
               <property>aero/qbar-psf</property>
               <property>metrics/Sw-sqft</property>
               <property>metrics/bw-ft</property>
               <property>aero/bi2vel</property>
               <property>velocities/p-rad_sec</property>
               <table>
                 <independentVar lookup="row">aero/Re</independentVar>
                 <tableData>
                     1897247  -0.0730
                     2086972  -0.0062
                     2845871  -0.0028
                     3805872  -0.0015
                 </tableData>
               </table>
           </product>
        </function>

        <function name="aero/moment/Yaw_damp">
           <description>Yaw moment due to yaw rate</description>
           <product>
               <property>aero/qbar-psf</property>
               <property>metrics/Sw-sqft</property>
               <property>metrics/bw-ft</property>
               <property>aero/bi2vel</property>
               <property>velocities/r-aero-rad_sec</property>
               <value> -0.15 </value>
           </product>
        </function>

        <function name="aero/moment/Yaw_rudder">
           <description>Yaw moment due to rudder</description>
           <product>
               <property>aero/qbar-psf</property>
               <property>metrics/Sw-sqft</property>
               <property>metrics/bw-ft</property>
               <property>fcs/rudder-pos-rad</property>
               <!-- <value> -0.05 </value> -->
               <property>coeffs/yaw-rudder</property>
           </product>
        </function>

        <function name="aero/moment/Yaw_water_rudder">
         <description>Yaw moment due to water rudder</description>
         <product>
              <property>/controls/gear/water-rudder-down</property>
             <table>
              <independentVar lookup="row">ground/solid</independentVar>
              <tableData>
                0     1
                1     0
              </tableData>
            </table>
             <property>fcs/rudder-pos-rad</property>
             <property>coeffs/water-rudder-factor</property>
         </product>
      </function>

        <function name="aero/moment/Yaw_aileron">
           <description>Adverse yaw</description>
           <product>
               <property>aero/qbar-psf</property>
               <property>metrics/Sw-sqft</property>
               <property>metrics/bw-ft</property>
               <property>fcs/left-aileron-pos-rad</property>
               <value> -0.0100 </value>
           </product>
        </function>

      </axis>

</aerodynamics>
