<?xml version="1.0"?>
<aerodynamics>
   <property value="1">coeffs/prop-c</property>
   <property value="-17">coeffs/pitch-dampening</property>
   <property value="-500">coeffs/water-rudder-factor</property>
   <function name="aero/function/kCDge">
      <description>Change_in_drag_due_to_ground_effect</description>
      <table>
          <independentVar>aero/h_b-mac-ft</independentVar>
          <tableData>
                0.0000    0.4800
                0.1000    0.5150
                0.1500    0.6290
                0.2000    0.7090
                0.3000    0.8150
                0.4000    0.8820
                0.5000    0.9280
                0.6000    0.9620
                0.7000    0.9880
                0.8000    1.0000
                0.9000    1.0000
                1.0000    1.0000
                1.1000    1.0000
            </tableData>
      </table>
  </function>

  <function name="aero/function/kCLge">
      <description>Change_in_lift_due_to_ground_effect</description>
      <table>
          <independentVar>aero/h_b-mac-ft</independentVar>
          <tableData>
                0.0000    1.2030
                0.1000    1.1270
                0.1500    1.0900
                0.2000    1.0730
                0.3000    1.0460
                0.4000    1.0280
                0.5000    1.0190
                0.6000    1.0130
                0.7000    1.0080
                0.8000    1.0060
                0.9000    1.0030
                1.0000    1.0020
                1.1000    1.0000
            </tableData>
      </table>
  </function>

    <axis name="LIFT">

        <function name="aero/force/Lift_propwash">
          <description>Delta lift due to propeller induced velocity</description>
          <product>
             <property>propulsion/engine[0]/thrust-coefficient</property>
              <property>aero/qbar-psf</property>
              <property>metrics/Sw-sqft</property>
              <table>
                <independentVar lookup="row">aero/alpha-rad</independentVar>
                <independentVar lookup="column">fcs/flap-pos-deg</independentVar>
                <tableData>
                         0.0     60.0
                  -0.22  0.000   0.000
                   0.00  0.052   0.138
                   0.24  0.245   0.652
                   0.47  0.000   0.000
                </tableData>
              </table>
              <property>coeffs/prop-c</property>
          </product>
        </function>

        <!-- Lift above 0.85 and below -0.85 is generalised -->
        <function name="aero/force/Lift_alpha">
          <description>Lift due to alpha</description>
          <product>
              <property>aero/qbar-psf</property>
              <property>metrics/Sw-sqft</property>
              <property>aero/function/kCLge</property>
              <table>
               <independentVar lookup="row">aero/alpha-wing-rad</independentVar>
               <independentVar lookup="column">fcs/flap-pos-deg</independentVar>
               <tableData>
                 0      15      60
                 -0.349  -0.538  -0.538  -0.538
                 -0.314  -0.566  -0.628  -0.720
                 -0.288  -0.627  -0.684  -0.768
                 -0.279  -1.129  -0.985  -0.768
                 -0.271  -1.156  -1.001  -0.768
                 -0.244  -1.084  -0.900  -0.624
                 -0.209  -1.004  -0.775  -0.432
                 0.000  0.090  0.403  0.768
                 0.070  0.484  0.806  1.200
                 0.175  1.075  1.382  1.872
                 0.244  1.406  1.661  2.043
                 0.262  1.459  1.696  2.052
                 0.279  1.498  1.718  1.980
                 0.305  1.522  1.739  1.600
                 0.314  1.485  1.692  1.350
                 0.332  1.280  1.400  1.200
                 0.349  1.020  1.150  1.100
                 0.419  0.768  0.900  1.000
                 0.611  0.576  0.700  0.850
               </tableData>
             </table>
              <!-- <table>
                <independentVar lookup="row">aero/alpha-rad</independentVar>
                <tableData>
                  -1.57  0.0000
                  -1.22 -0.5869
                  -1.05 -0.7906
                  -0.88 -0.9130
                  -0.66 -0.4695
                  -0.27 -1.1737
                   0.00  0.3152
                   0.22  1.4889
                   0.60  0.7847
                   0.88  1.0870
                   1.05  0.9414
                   1.22  0.6987
                   1.57  0.0000
                </tableData>
              </table>-->
          </product>
        </function>

        <function name="aero/force/Lift_pitch_rate">
            <description>Lift due to pitch rate</description>
            <product>
              <property>aero/qbar-psf</property>
              <property>metrics/Sw-sqft</property>
              <property>velocities/q-aero-rad_sec</property>
              <property>aero/ci2vel</property>
              <value> 3.2996 </value>
            </product>
          </function>

          <function name="aero/force/Lift_alpha_rate">
            <description>Lift due to alpha rate</description>
            <product>
               <property>aero/qbar-psf</property>
               <property>metrics/Sw-sqft</property>
               <property>aero/alphadot-rad_sec</property>
               <property>aero/ci2vel</property>
               <value> 1.2654 </value>
            </product>
          </function>

        <function name="aero/force/Lift_elevator">
           <description>Lift due to Elevator Deflection</description>
           <product>
               <property>aero/qbar-psf</property>
               <property>metrics/Sw-sqft</property>
               <property>fcs/elevator-pos-rad</property>
               <value> 0.2679 </value>
           </product>
        </function>

        <!-- <function name="aero/force/Lift_flap">
           <description>Delta Lift due to flaps</description>
           <product>
               <property>aero/qbar-psf</property>
               <property>metrics/Sw-sqft</property>
               <property>fcs/flap-pos-deg</property>
               <value> 0.0123 </value>
           </product>
        </function> -->


      </axis>

      <axis name="DRAG">

        <!-- CD0 is based on fuselage, wing, horizontal- en vertical tail -->
        <!-- Antennas, struts and wires are not taken into account        -->
        <!-- CD for gear (fixed and retractable) is defined below         -->
        <function name="aero/force/Drag_minimum">
           <description>Minimum drag</description>
           <product>
              <property>aero/qbar-psf</property>
              <property>metrics/Sw-sqft</property>

              <value> 0.0266 </value>
           </product>
        </function>

        <function name="aero/force/Drag_alpha">
           <description>Drag due to alpha</description>
           <product>
              <property>aero/qbar-psf</property>
              <property>metrics/Sw-sqft</property>
              <table>
                <independentVar lookup="row">aero/alpha-rad</independentVar>
                <tableData>
                 -1.57    1.4099
                 -0.22    0.0298
                  0.00    0.0000
                  0.22    0.0298
                  1.57    1.4099
                </tableData>
              </table>
           </product>
        </function>

        <function name="aero/force/Drag_induced">
           <description>Induced drag</description>
             <product>
               <property>aero/qbar-psf</property>
               <property>metrics/Sw-sqft</property>
               <property>aero/cl-squared</property>
               <value> 0.0402 </value>
             </product>
        </function>

        <function name="aero/force/Drag_mach">
           <description>Drag due to mach</description>
            <product>
              <property>aero/qbar-psf</property>
              <property>metrics/Sw-sqft</property>
              <table>
                <independentVar lookup="row">velocities/mach</independentVar>
                <tableData>
                    0.00    0.0000
                    0.70    0.0000
                    1.10    0.0230
                    1.80    0.0150
                </tableData>
              </table>
            </product>
        </function>

        <function name="aero/force/Drag_beta">
           <description>Drag due to sideslip</description>
           <product>
              <property>aero/qbar-psf</property>
              <property>metrics/Sw-sqft</property>
              <table>
                <independentVar lookup="row">aero/beta-rad</independentVar>
                <tableData>
                  -1.57    1.2300
                  -0.26    0.0500
                   0.00    0.0000
                   0.26    0.0500
                   1.57    1.2300
                </tableData>
              </table>
           </product>
        </function>

        <function name="aero/force/Drag_elevator">
           <description>Drag due to Elevator Deflection</description>
           <product>
               <property>aero/qbar-psf</property>
               <property>metrics/Sw-sqft</property>
               <abs><property>fcs/elevator-pos-rad</property></abs>
               <value> 0.0400 </value>
           </product>
        </function>

        <function name="aero/force/Drag_flap">
           <description>Drag due to flaps</description>
             <product>
               <property>aero/qbar-psf</property>
               <property>metrics/Sw-sqft</property>
               <property>fcs/flap-pos-deg</property>
               <value> 0.0009 </value>
             </product>
        </function>


      </axis>

      <axis name="SIDE">

        <function name="aero/force/Side_beta">
           <description>Side force due to beta</description>
           <product>
               <property>aero/qbar-psf</property>
               <property>metrics/Sw-sqft</property>
               <property>aero/beta-rad</property>
               <value> -0.2583 </value>
           </product>
        </function>
        <function name="aero/force/Side_roll_rate">
           <description>Side force due to roll rate</description>
           <product>
               <property>aero/qbar-psf</property>
               <property>metrics/Sw-sqft</property>
               <property>aero/bi2vel</property>
               <property>velocities/p-aero-rad_sec</property>
               <table>
                 <independentVar lookup="row">aero/Re</independentVar>
                 <tableData>
                     1897247   0.2724
                     2086972   0.0232
                     2845871   0.0103
                     3805872   0.0058
                 </tableData>
               </table>
           </product>
        </function>

        <function name="aero/force/Side_yaw_rate">
           <description>Side force due to yaw rate</description>
           <product>
               <property>aero/qbar-psf</property>
               <property>metrics/Sw-sqft</property>
               <property>aero/bi2vel</property>
               <property>velocities/r-aero-rad_sec</property>
               <value> 0.1384 </value>
           </product>
        </function>

        <function name="aero/force/Side_rudder">
           <description>Side force due to rudder</description>
           <product>
               <property>aero/qbar-psf</property>
               <property>metrics/Sw-sqft</property>
               <property>fcs/rudder-pos-rad</property>
               <value> 0.0789 </value>
           </product>
        </function>

      </axis>

      <axis name="PITCH">

        <function name="aero/moment/Pitch_propwash">
          <description>Pitch moment due to propeller induced velocity</description>
          <product>
              <property>propulsion/engine[0]/thrust-coefficient</property>
              <property>aero/qbar-psf</property>
              <property>metrics/Sw-sqft</property>
              <property>metrics/bw-ft</property>
              <table>
                <independentVar lookup="row">aero/alpha-rad</independentVar>
                <independentVar lookup="column">fcs/flap-pos-deg</independentVar>
                <tableData>
                         0.0     60.0
                  -0.01  0.000   0.000
                   0.00 -0.021  -0.056
                   0.24 -0.100  -0.267
                   0.31  0.000   0.000
                </tableData>
              </table>
          </product>
        </function>

        <function name="aero/moment/Pitch_alpha">
           <description>Pitch moment due to alpha</description>
           <product>
               <property>aero/qbar-psf</property>
               <property>metrics/Sw-sqft</property>
               <property>metrics/cbarw-ft</property>
               <property>aero/alpha-rad</property>
               <value> -1.0968 </value>
           </product>
        </function>

        <function name="aero/moment/Pitch_elevator">
           <description>Pitch moment due to elevator</description>
           <product>
              <property>aero/qbar-psf</property>
              <property>metrics/Sw-sqft</property>
              <property>metrics/cbarw-ft</property>
              <property>fcs/elevator-pos-rad</property>
              <table>
                <independentVar lookup="row">velocities/mach</independentVar>
                <tableData>
                  0.0    -1.0649
                  2.0    -0.2662
                </tableData>
              </table>
           </product>
        </function>

        <function name="aero/moment/Pitch_damp">
           <description>Pitch moment due to pitch rate</description>
           <product>
               <property>aero/qbar-psf</property>
               <property>metrics/Sw-sqft</property>
               <property>metrics/cbarw-ft</property>
               <property>aero/ci2vel</property>
               <property>velocities/q-aero-rad_sec</property>
               <property>coeffs/pitch-dampening</property>
           </product>
        </function>

        <function name="aero/moment/Pitch_alphadot">
           <description>Pitch moment due to alpha rate</description>
           <product>
               <property>aero/qbar-psf</property>
               <property>metrics/Sw-sqft</property>
               <property>metrics/cbarw-ft</property>
               <property>aero/ci2vel</property>
               <property>aero/alphadot-rad_sec</property>
               <value> -2.9666 </value>
           </product>
        </function>

      </axis>

      <axis name="ROLL">

        <function name="aero/moment/Roll_differential_propwash">
           <description>Roll moment due to differential propwash</description>
           <product>
               <property>propulsion/engine[0]/thrust-coefficient</property>
               <property>aero/qbar-psf</property>
               <property>metrics/Sw-sqft</property>
               <property>metrics/bw-ft</property>
               <property>aero/alpha-rad</property>
               <value> 0.1320 </value>
           </product>
        </function>

        <function name="aero/moment/Roll_beta">
           <description>Roll moment due to beta</description>
           <product>
               <property>aero/qbar-psf</property>
               <property>metrics/Sw-sqft</property>
               <property>metrics/bw-ft</property>
               <property>aero/beta-rad</property>
               <!-- <property>fcs/gear-no-wow</property> -->
               <table>
                 <independentVar lookup="row">aero/alpha-rad</independentVar>
                 <independentVar lookup="column">aero/Re</independentVar>
                 <tableData>
                              1897247  2086972  2845871  3805872
                     -0.0349  -0.3960  -0.0730  -0.0562  -0.0503
                      0.3491  -0.3960  -0.0730  -0.0562  -0.0503
                 </tableData>
               </table>
           </product>
        </function>

        <function name="aero/moment/Roll_damp">
           <description>Roll moment due to roll rate</description>
           <product>
               <property>aero/qbar-psf</property>
               <property>metrics/Sw-sqft</property>
               <property>metrics/bw-ft</property>
               <property>aero/bi2vel</property>
               <property>velocities/p-aero-rad_sec</property>
               <value> -0.6823 </value>
           </product>
        </function>

        <function name="aero/moment/Roll_yaw">
           <description>Roll moment due to yaw rate</description>
           <product>
               <property>aero/qbar-psf</property>
               <property>metrics/Sw-sqft</property>
               <property>metrics/bw-ft</property>
               <property>aero/bi2vel</property>
               <property>velocities/r-aero-rad_sec</property>
               <table>
                 <independentVar lookup="row">aero/alpha-rad</independentVar>
                 <independentVar lookup="column">aero/Re</independentVar>
                 <tableData>
                              1897247  2086972  2845871  3805872
                     -0.0349   0.0273   0.0273   0.0273   0.0273
                      0.3491   3.7181   0.5479   0.5479   0.5479
                 </tableData>
               </table>
           </product>
        </function>

        <function name="aero/moment/Roll_aileron">
           <description>Roll moment due to aileron</description>
           <product>
              <property>aero/qbar-psf</property>
              <property>metrics/Sw-sqft</property>
              <property>metrics/bw-ft</property>
              <property>fcs/left-aileron-pos-rad</property>
               <table>
                <independentVar lookup="row">velocities/mach</independentVar>
                <tableData>
                  0.0    0.1700
                  2.0    0.0425
                </tableData>
              </table>
           </product>
        </function>

        <function name="aero/moment/Roll_rudder">
           <description>Roll moment due to rudder</description>
           <product>
               <property>aero/qbar-psf</property>
               <property>metrics/Sw-sqft</property>
               <property>metrics/bw-ft</property>
               <property>fcs/rudder-pos-rad</property>
               <value> 0.0100 </value>
           </product>
        </function>

      </axis>

      <axis name="YAW">

        <!-- Stall initiator -->
        <function name="aero/moment/Yaw_alpha">
           <description>Yaw moment due to alpha</description>
           <product>
               <property>aero/qbar-psf</property>
               <property>metrics/Sw-sqft</property>
               <property>metrics/bw-ft</property>
               <property>aero/alpha-rad</property>
               <!-- <property>fcs/gear-no-wow</property> -->
               <table>
                 <independentVar lookup="row">aero/beta-rad</independentVar>
                 <independentVar lookup="column">aero/Re</independentVar>
                 <tableData>
                              1897247  2086972
                     -0.3491  -1.0000   0.0000
                      0.3491   1.0000   0.0000
                 </tableData>
               </table>
           </product>
        </function>

        <function name="aero/moment/Yaw_beta">
           <description>Yaw moment due to beta</description>
           <product>
               <property>aero/qbar-psf</property>
               <property>metrics/Sw-sqft</property>
               <property>metrics/bw-ft</property>
               <property>aero/beta-rad</property>
               <value> 0.0332 </value>
           </product>
        </function>

        <function name="aero/moment/Yaw_roll_rate">
           <description>Yaw moment due to roll rate</description>
           <product>
               <property>aero/qbar-psf</property>
               <property>metrics/Sw-sqft</property>
               <property>metrics/bw-ft</property>
               <property>aero/bi2vel</property>
               <property>velocities/p-rad_sec</property>
               <table>
                 <independentVar lookup="row">aero/Re</independentVar>
                 <tableData>
                     1897247  -0.0730
                     2086972  -0.0062
                     2845871  -0.0028
                     3805872  -0.0015
                 </tableData>
               </table>
           </product>
        </function>

        <function name="aero/moment/Yaw_damp">
           <description>Yaw moment due to yaw rate</description>
           <product>
               <property>aero/qbar-psf</property>
               <property>metrics/Sw-sqft</property>
               <property>metrics/bw-ft</property>
               <property>aero/bi2vel</property>
               <property>velocities/r-aero-rad_sec</property>
               <value> -0.0289 </value>
           </product>
        </function>

        <function name="aero/moment/Yaw_rudder">
           <description>Yaw moment due to rudder</description>
           <product>
               <property>aero/qbar-psf</property>
               <property>metrics/Sw-sqft</property>
               <property>metrics/bw-ft</property>
               <property>fcs/rudder-pos-rad</property>
               <value> -0.0211 </value>
           </product>
        </function>

        <function name="aero/moment/Yaw_water_rudder">
         <description>Yaw moment due to water rudder</description>
         <product>
              <property>/controls/gear/water-rudder-down</property>
             <table>
              <independentVar lookup="row">ground/solid</independentVar>
              <tableData>
                0     1
                1     0
              </tableData>
            </table>
             <property>fcs/rudder-pos-rad</property>
             <property>coeffs/water-rudder-factor</property>
         </product>
      </function>

        <function name="aero/moment/Yaw_aileron">
           <description>Adverse yaw</description>
           <product>
               <property>aero/qbar-psf</property>
               <property>metrics/Sw-sqft</property>
               <property>metrics/bw-ft</property>
               <property>fcs/left-aileron-pos-rad</property>
               <value> -0.0100 </value>
           </product>
        </function>

      </axis>

</aerodynamics>
