<?xml version="1.0"?>
<?xml-stylesheet type="text/xsl" href="http://jsbsim.sourceforge.net/JSBSim.xsl"?>
<fdm_config name="seamax" version="2.0" release="ALPHA"
   xmlns:xsi="http://www.w3.org/2001/XMLSchema-instance"
   xsi:noNamespaceSchemaLocation="http://jsbsim.sourceforge.net/JSBSim.xsd">

 <fileheader>
  <author> Aeromatic v 0.96 </author>
  <filecreationdate>2025-09-26</filecreationdate>
  <version>$Revision: 1.20 $</version>
  <description> Models a seamax. </description>
 </fileheader>

<!--
  File:     seamax.xml
  Inputs:
    name:          seamax
    type:          light single
    max weight:    1323 lb
    wing span:     33.07248 ft
    length:        19.85005 ft
    wing area:     129.61013044 sq-ft
    gear type:     tricycle
    castering:
    retractable?:  yes
    # engines:     1
    engine type:   piston
    engine layout: middle fuselage
    yaw damper?    no

  Outputs:
    wing loading:  10.21 lb/sq-ft
    payload:       375.3 lbs
    CL-alpha:      5 per radian
    CL-0:          0.25
    CL-max:        1.4
    CD-0:          0.024
    K:             0.04
    CG empty:      2.53m (99.6in)
-->

 <metrics>
   <wingarea  unit="FT2">  129.61 </wingarea>
   <wingspan  unit="FT" >   33.07 </wingspan>
   <wing_incidence>          2.00 </wing_incidence>
   <chord     unit="FT" >    3.92 </chord>
   <htailarea unit="FT2">   22.61 </htailarea>
   <htailarm  unit="FT" >    9.19 </htailarm>
   <vtailarea unit="FT2">    7.27 </vtailarea>
   <vtailarm  unit="FT" >    8.86 </vtailarm>
   <location name="AERORP" unit="M">
     <x> 2.15 </x>
     <y> 0.00 </y>
     <z> 1  </z>
   </location>
   <location name="EYEPOINT" unit="M">
      <x> 1.52 </x>
      <y> -0.35 </y>
      <z>  1.17 </z>
   </location>
   <location name="VRP" unit="M">
     <x>0</x>
     <y>0</y>
     <z>0</z>
   </location>
 </metrics>

 <mass_balance>
    <!-- <ixx unit="SLUG*FT2">       706 </ixx>
	<iyy unit="SLUG*FT2">       245 </iyy>
	<izz unit="SLUG*FT2">       871 </izz> -->
   <ixx unit="SLUG*FT2">       465 </ixx>
   <iyy unit="SLUG*FT2">       298 </iyy>
   <izz unit="SLUG*FT2">       821 </izz>
   <emptywt unit="LBS" >       752 </emptywt>
   <!-- min: 84.7 in max 94 in-->
   <location name="CG" unit="M">
     <x> 2.53 </x>
     <y>   0.00 </y>
     <z>  1 </z>
   </location>
   <pointmass name="Pilot">
    <weight unit="KG">    80 </weight>
    <location name="Pilot" unit="M">
      <x> 1.67 </x>
      <y> -0.35 </y>
      <z> 0.7 </z>
    </location>
  </pointmass>
  <pointmass name="Co-Pilot">
    <weight unit="KG">    80 </weight>
    <location name="Co-Pilot" unit="M">
      <x> 1.67 </x>
      <y> 0.35 </y>
      <z> 0.7 </z>
    </location>
  </pointmass>
  <pointmass name="Baggage Pilot">
    <weight unit="KG">    0 </weight>
    <location name="Baggage Pilot" unit="M">
      <x> 2.2 </x>
      <y>-0.35 </y>
      <z> 0.7 </z>
    </location>
  </pointmass>
  <pointmass name="Baggage Co-Pilot">
    <weight unit="KG">    0 </weight>
    <location name="Baggage Co-Pilot" unit="M">
      <x> 2.2 </x>
      <y> 0.35 </y>
      <z> 0.7 </z>
    </location>
  </pointmass>
   <!-- <pointmass name="Payload">
    <description> 375 LBS + full (196 LBS) fuel should bring model up to entered max weight</description>
    <weight unit="LBS">    187.6 </weight>
    <location name="POINTMASS" unit="M">
      <x> 127.96 </x>
      <y>   0.00 </y>
      <z>  0.57 </z>
    </location>
  </pointmass>  -->
 </mass_balance>

 <ground_reactions>

  <contact type="BOGEY" name="NOSE">
   <location unit="M">
     <x>  0.19 </x>
     <y>   0.00 </y>
     <z> 0 </z>
   </location>
   <static_friction>  0.60 </static_friction>
   <dynamic_friction> 0.30 </dynamic_friction>
   <rolling_friction> 0.01 </rolling_friction>
   <spring_coeff unit="LBS/FT">        396.90 </spring_coeff>
   <damping_coeff unit="LBS/FT/SEC">   198.45 </damping_coeff>
   <max_steer unit="DEG"> 5.00 </max_steer>
   <brake_group>NONE</brake_group>
   <retractable>1</retractable>
  </contact>

  <contact type="BOGEY" name="LEFT_MAIN">
   <location unit="M">
     <x> 2.5 </x>
     <y> -0.88 </y>
     <z> 0 </z>
   </location>
   <static_friction>  0.60 </static_friction>
   <dynamic_friction> 0.30 </dynamic_friction>
   <rolling_friction> 0.01 </rolling_friction>
   <spring_coeff unit="LBS/FT">       1323.00 </spring_coeff>
   <damping_coeff unit="LBS/FT/SEC">   661.50 </damping_coeff>
   <max_steer unit="DEG">0</max_steer>
   <brake_group>LEFT</brake_group>
   <retractable>1</retractable>
  </contact>

  <contact type="BOGEY" name="RIGHT_MAIN">
   <location unit="M">
    <x> 2.5 </x>
    <y> 0.88 </y>
    <z> 0 </z>
   </location>
   <static_friction>  0.60 </static_friction>
   <dynamic_friction> 0.30 </dynamic_friction>
   <rolling_friction> 0.01 </rolling_friction>
   <spring_coeff unit="LBS/FT">       1323.00 </spring_coeff>
   <damping_coeff unit="LBS/FT/SEC">   661.50 </damping_coeff>
   <max_steer unit="DEG">0</max_steer>
   <brake_group>RIGHT</brake_group>
   <retractable>1</retractable>
  </contact>

  <contact type="STRUCTURE" name="CENTER_HULL">
    <location unit="M">
      <x> 1.0 </x>
      <y> 0 </y>
      <z> 0.3 </z>
    </location>
    <static_friction>0.50</static_friction>
    <dynamic_friction>0.1</dynamic_friction>
    <rolling_friction> 0.01</rolling_friction>
    <spring_coeff unit="LBS/FT">1000.00 </spring_coeff>
    <damping_coeff unit="LBS/FT/SEC">300.00 </damping_coeff>
  </contact>

  <contact type="STRUCTURE" name="LEFT_HULL">
    <location unit="M">
      <x> 3 </x>
      <y> -0.6 </y>
      <z> 0.3 </z>
    </location>
    <static_friction>0.5</static_friction>
    <dynamic_friction>0.1</dynamic_friction>
    <rolling_friction> 0.01</rolling_friction>
    <spring_coeff unit="LBS/FT">10000.00 </spring_coeff>
    <damping_coeff unit="LBS/FT/SEC">2500.00 </damping_coeff>
   </contact>

   <contact type="STRUCTURE" name="RIGHT_HULL">
    <location unit="M">
     <x> 3 </x>
     <y> 0.6 </y>
     <z> 0.3 </z>
    </location>
    <static_friction>0.5</static_friction>
    <dynamic_friction>0.1</dynamic_friction>
    <rolling_friction> 0.01</rolling_friction>
    <spring_coeff unit="LBS/FT">10000.00 </spring_coeff>
    <damping_coeff unit="LBS/FT/SEC">2500.00 </damping_coeff>
   </contact>

   <contact type="STRUCTURE" name="LEFT_FLOAT">
    <location unit="M">
     <x> 2.0 </x>
     <y> -4.6 </y>
     <z> 0.8 </z>
    </location>
    <static_friction>0.002</static_friction>
    <dynamic_friction>0.1</dynamic_friction>
    <rolling_friction> 0.1</rolling_friction>
    <spring_coeff unit="LBS/FT">10000.00 </spring_coeff>
    <damping_coeff unit="LBS/FT/SEC">2500.00 </damping_coeff>
   </contact>

   <contact type="STRUCTURE" name="RIGHT_FLOAT">
    <location unit="M">
      <x> 2.0 </x>
      <y> 4.6 </y>
      <z> 0.8 </z>
    </location>
    <static_friction>0.002</static_friction>
    <dynamic_friction>0.01</dynamic_friction>
    <rolling_friction> 0.01</rolling_friction>
    <spring_coeff unit="LBS/FT">10000.00 </spring_coeff>
    <damping_coeff unit="LBS/FT/SEC">2500.00 </damping_coeff>
   </contact>

   <contact type="STRUCTURE" name="LEFT_WING">
    <location unit="M">
     <x> 2.345 </x>
     <y> -5.21 </y>
     <z>  1.47 </z>
    </location>
    <static_friction>  1.00 </static_friction>
    <dynamic_friction> 1.00 </dynamic_friction>
    <spring_coeff unit="LBS/FT">       1323.00 </spring_coeff>
    <damping_coeff unit="LBS/FT/SEC">  1323.00 </damping_coeff>
  </contact>

  <contact type="STRUCTURE" name="RIGHT_WING">
    <location unit="M">
      <x> 2.345 </x>
        <y>  5.21 </y>
        <z>  1.47 </z>
    </location>
    <static_friction>  1.00 </static_friction>
    <dynamic_friction> 1.00 </dynamic_friction>
    <spring_coeff unit="LBS/FT">       1323.00 </spring_coeff>
    <damping_coeff unit="LBS/FT/SEC">  1323.00 </damping_coeff>
  </contact>

 </ground_reactions>


 <propulsion>

   <engine file="Rotax-912-is">
    <location unit="M">
      <x> 2.95 </x>
      <y>  0.00 </y>
      <z>  1.72</z>
    </location>
    <feed>0</feed>
    <feed>1</feed>
    <thruster file="Senseich-68">
     <sense> 1 </sense>
     <location unit="M">
       <x> 3.3 </x>
       <y>   0.00 </y>
       <z> 1.72 </z>
     </location>
     <orient unit="DEG">
       <pitch> 3.00 </pitch>
       <roll>  0.00 </roll>
       <yaw>   0.00 </yaw>
     </orient>
    </thruster>
  </engine>

  <tank type="FUEL" number="0">
     <location unit="M">
       <x> 2.3 </x>
       <y> -1.0 </y>
       <z>  1.41 </z>
     </location>
     <capacity unit="LBS">  76.90 </capacity>
     <contents unit="LBS">  48.84 </contents>
  </tank>

  <tank type="FUEL" number="1">
     <location unit="M">
        <x> 2.3 </x>
        <y>  1.0 </y>
        <z>  1.41 </z>
     </location>
     <capacity unit="LBS">  76.90 </capacity>
     <contents unit="LBS">  48.84 </contents>
  </tank>

 </propulsion>

 <flight_control name="FCS: seamax">

  <channel name="Pitch">

   <summer name="Pitch Trim Sum">
      <input>fcs/elevator-cmd-norm</input>
      <input>fcs/pitch-trim-cmd-norm</input>
      <clipto>
        <min> -1 </min>
        <max>  1 </max>
      </clipto>
   </summer>

   <aerosurface_scale name="Elevator Control">
      <input>fcs/pitch-trim-sum</input>
      <range>
        <min> -0.35 </min>
        <max>  0.35 </max>
      </range>
      <output>fcs/elevator-pos-rad</output>
   </aerosurface_scale>

   <aerosurface_scale name="elevator normalization">
      <input>fcs/elevator-pos-rad</input>
      <domain>
        <min> -0.35 </min>
        <max>  0.35 </max>
      </domain>
      <range>
        <min> -1 </min>
        <max>  1 </max>
      </range>
      <output>fcs/elevator-pos-norm</output>
   </aerosurface_scale>

  </channel>

  <channel name="Roll">

   <summer name="Roll Trim Sum">
      <input>fcs/aileron-cmd-norm</input>
      <input>fcs/roll-trim-cmd-norm</input>
      <clipto>
        <min> -1 </min>
        <max>  1 </max>
      </clipto>
   </summer>

   <aerosurface_scale name="Left Aileron Control">
      <input>fcs/roll-trim-sum</input>
      <range>
        <min> -0.35 </min>
        <max>  0.35 </max>
      </range>
      <output>fcs/left-aileron-pos-rad</output>
   </aerosurface_scale>

   <aerosurface_scale name="Right Aileron Control">
      <input>fcs/roll-trim-sum</input>
      <range>
        <min> -0.35 </min>
        <max>  0.35 </max>
      </range>
      <output>fcs/right-aileron-pos-rad</output>
   </aerosurface_scale>

   <aerosurface_scale name="left aileron normalization">
      <input>fcs/left-aileron-pos-rad</input>
      <domain>
        <min> -0.35 </min>
        <max>  0.35 </max>
      </domain>
      <range>
        <min> -1 </min>
        <max>  1 </max>
      </range>
      <output>fcs/left-aileron-pos-norm</output>
   </aerosurface_scale>

   <aerosurface_scale name="right aileron normalization">
      <input>fcs/right-aileron-pos-rad</input>
      <domain>
        <min> -0.35 </min>
        <max>  0.35 </max>
      </domain>
      <range>
        <min> -1 </min>
        <max>  1 </max>
      </range>
      <output>fcs/right-aileron-pos-norm</output>
   </aerosurface_scale>

  </channel>

  <channel name="Yaw">

   <summer name="Rudder Command Sum">
      <input>fcs/rudder-cmd-norm</input>
      <input>fcs/yaw-trim-cmd-norm</input>
      <clipto>
        <min> -1 </min>
        <max>  1 </max>
      </clipto>
   </summer>

   <aerosurface_scale name="Rudder Control">
      <input>fcs/rudder-command-sum</input>
      <range>
        <min> -0.35 </min>
        <max>  0.35 </max>
      </range>
      <output>fcs/rudder-pos-rad</output>
   </aerosurface_scale>

   <aerosurface_scale name="rudder normalization">
      <input>fcs/rudder-pos-rad</input>
      <domain>
        <min> -0.35 </min>
        <max>  0.35 </max>
      </domain>
      <range>
        <min> -1 </min>
        <max>  1 </max>
      </range>
      <output>fcs/rudder-pos-norm</output>
   </aerosurface_scale>

  </channel>

  <channel name="Flaps">
   <kinematic name="Flaps Control">
     <input>fcs/flap-cmd-norm</input>
     <traverse>
      <setting>
        <position>  -5 </position>
        <time>      2 </time>
     </setting>
       <setting>
          <position>  0 </position>
          <time>      0 </time>
       </setting>
       <setting>
          <position> 10 </position>
          <time>      2 </time>
       </setting>
      <setting>
        <position> 18 </position>
        <time>      2 </time>
      </setting>
      <setting>
        <position> 28 </position>
        <time>      2 </time>
      </setting>
       <setting>
        <position> 35 </position>
        <time>      3 </time>
       </setting>
     </traverse>
     <output>fcs/flap-pos-deg</output>
   </kinematic>

   <aerosurface_scale name="flap normalization">
      <input>fcs/flap-pos-deg</input>
      <domain>
        <min> -5 </min>
        <max> 35 </max>
      </domain>
      <range>
        <min> 0 </min>
        <max> 1 </max>
      </range>
      <output>fcs/flap-pos-norm</output>
   </aerosurface_scale>

  </channel>

  <channel name="Landing Gear">
   <kinematic name="Gear Control">
     <input>gear/gear-cmd-norm</input>
     <traverse>
       <setting>
          <position> 0 </position>
          <time>     0 </time>
       </setting>
       <setting>
          <position> 1 </position>
          <time>     3 </time>
       </setting>
     </traverse>
     <output>gear/gear-pos-norm</output>
   </kinematic>

  </channel>

  <channel name="Speedbrake">
   <kinematic name="Speedbrake Control">
     <input>fcs/speedbrake-cmd-norm</input>
     <traverse>
       <setting>
          <position> 0 </position>
          <time>     0 </time>
       </setting>
       <setting>
          <position> 1 </position>
          <time>     1 </time>
       </setting>
     </traverse>
     <output>fcs/speedbrake-pos-norm</output>
   </kinematic>

  </channel>
  <channel name="alpha-wing-rad-to-deg">
    <pure_gain name="wing-incidence-deg">
      <input>aero/alpha-wing-rad</input>
      <gain>57.29578</gain>
      <output>aero/alpha-wing-deg</output>
    </pure_gain>
  </channel>

 </flight_control>

 <aerodynamics>

  <axis name="LIFT">

    <function name="aero/force/Lift_alpha">
      <description>Lift due to alpha</description>
      <product>
          <property>aero/qbar-psf</property>
          <property>metrics/Sw-sqft</property>
          <table>
            <independentVar lookup="row">aero/alpha-rad</independentVar>
            <tableData>
              -0.20 -0.750
               0.00  0.350
               0.23  1.600
               0.60  0.710
            </tableData>
          </table>
      </product>
    </function>

    <function name="aero/force/Lift_flap">
       <description>Delta Lift due to flaps</description>
       <product>
           <property>aero/qbar-psf</property>
           <property>metrics/Sw-sqft</property>
           <property>fcs/flap-pos-deg</property>
           <value> 0.01333 </value>
       </product>
    </function>

    <function name="aero/force/Lift_speedbrake">
       <description>Delta Lift due to speedbrake</description>
       <product>
           <property>aero/qbar-psf</property>
           <property>metrics/Sw-sqft</property>
           <property>fcs/speedbrake-pos-norm</property>
           <value>0</value>
       </product>
    </function>

    <function name="aero/force/Lift_elevator">
       <description>Lift due to Elevator Deflection</description>
       <product>
           <property>aero/qbar-psf</property>
           <property>metrics/Sw-sqft</property>
           <property>fcs/elevator-pos-rad</property>
           <value>0.3</value>
       </product>
    </function>

  </axis>

  <axis name="DRAG">

    <function name="aero/force/Drag_basic">
       <description>Drag at zero lift</description>
       <product>
          <property>aero/qbar-psf</property>
          <property>metrics/Sw-sqft</property>
          <table>
            <independentVar lookup="row">aero/alpha-rad</independentVar>
            <tableData>
             -1.57    1.500
             -0.26    0.031
              0.00    0.024
              0.26    0.031
              1.57    1.500
            </tableData>
          </table>
       </product>
    </function>

    <function name="aero/force/Drag_induced">
       <description>Induced drag</description>
         <product>
           <property>aero/qbar-psf</property>
           <property>metrics/Sw-sqft</property>
           <property>aero/cl-squared</property>
           <value>0.04</value>
         </product>
    </function>

    <function name="aero/force/Drag_mach">
       <description>Drag due to mach</description>
        <product>
          <property>aero/qbar-psf</property>
          <property>metrics/Sw-sqft</property>
          <table>
            <independentVar lookup="row">velocities/mach</independentVar>
            <tableData>
                0.00      0.000
                0.7      0.000
                1.10      0.023
                1.80      0.015
            </tableData>
          </table>
        </product>
    </function>

    <function name="aero/force/Drag_flap">
       <description>Drag due to flaps</description>
         <product>
           <property>aero/qbar-psf</property>
           <property>metrics/Sw-sqft</property>
           <property>fcs/flap-pos-deg</property>
           <value> 0.00100 </value>
         </product>
    </function>

    <function name="aero/force/Drag_gear">
       <description>Drag due to gear</description>
         <product>
           <property>aero/qbar-psf</property>
           <property>metrics/Sw-sqft</property>
           <property>gear/gear-pos-norm</property>
           <value>0.001</value>
         </product>
    </function>

    <function name="aero/force/Drag_speedbrake">
       <description>Drag due to speedbrakes</description>
         <product>
           <property>aero/qbar-psf</property>
           <property>metrics/Sw-sqft</property>
           <property>fcs/speedbrake-pos-norm</property>
           <value>0.024</value>
         </product>
    </function>

    <function name="aero/force/Drag_beta">
       <description>Drag due to sideslip</description>
       <product>
          <property>aero/qbar-psf</property>
          <property>metrics/Sw-sqft</property>
          <table>
            <independentVar lookup="row">aero/beta-rad</independentVar>
            <tableData>
              -1.57    1.230
              -0.26    0.050
               0.00    0.000
               0.26    0.050
               1.57    1.230
            </tableData>
          </table>
       </product>
    </function>

    <function name="aero/force/Drag_elevator">
       <description>Drag due to Elevator Deflection</description>
       <product>
           <property>aero/qbar-psf</property>
           <property>metrics/Sw-sqft</property>
           <abs><property>fcs/elevator-pos-norm</property></abs>
           <value>0.04</value>
       </product>
    </function>

  </axis>

  <axis name="SIDE">

    <function name="aero/force/Side_beta">
       <description>Side force due to beta</description>
       <product>
           <property>aero/qbar-psf</property>
           <property>metrics/Sw-sqft</property>
           <property>aero/beta-rad</property>
           <value>-1</value>
       </product>
    </function>

  </axis>

  <axis name="ROLL">

    <function name="aero/moment/Roll_beta">
       <description>Roll moment due to beta</description>
       <product>
           <property>aero/qbar-psf</property>
           <property>metrics/Sw-sqft</property>
           <property>metrics/bw-ft</property>
           <property>aero/beta-rad</property>
           <value>-0.1</value>
       </product>
    </function>

    <function name="aero/moment/Roll_damp">
       <description>Roll moment due to roll rate</description>
       <product>
           <property>aero/qbar-psf</property>
           <property>metrics/Sw-sqft</property>
           <property>metrics/bw-ft</property>
           <property>aero/bi2vel</property>
           <property>velocities/p-aero-rad_sec</property>
           <value>-0.4</value>
       </product>
    </function>

    <function name="aero/moment/Roll_yaw">
       <description>Roll moment due to yaw rate</description>
       <product>
           <property>aero/qbar-psf</property>
           <property>metrics/Sw-sqft</property>
           <property>metrics/bw-ft</property>
           <property>aero/bi2vel</property>
           <property>velocities/r-aero-rad_sec</property>
           <value>0.15</value>
       </product>
    </function>

    <function name="aero/moment/Roll_aileron">
       <description>Roll moment due to aileron</description>
       <product>
          <property>aero/qbar-psf</property>
          <property>metrics/Sw-sqft</property>
          <property>metrics/bw-ft</property>
          <property>fcs/left-aileron-pos-rad</property>
          <value>0.17</value>
       </product>
    </function>

    <function name="aero/moment/Roll_rudder">
       <description>Roll moment due to rudder</description>
       <product>
           <property>aero/qbar-psf</property>
           <property>metrics/Sw-sqft</property>
           <property>metrics/bw-ft</property>
           <property>fcs/rudder-pos-rad</property>
           <value>0.01</value>
       </product>
    </function>

  </axis>

  <axis name="PITCH">

    <function name="aero/moment/Pitch_alpha">
       <description>Pitch moment due to alpha</description>
       <product>
           <property>aero/qbar-psf</property>
           <property>metrics/Sw-sqft</property>
           <property>metrics/cbarw-ft</property>
           <property>aero/alpha-rad</property>
           <!-- <value>-0.5</value> -->
           <value>-0.7</value>
           <!--from c172p-->
           <table>
             <independentVar lookup="row">aero/alpha-deg</independentVar>
             <tableData>
               20    1
               25    0.6
               35    0.4
               45    0.5
               55    0.4
               65    0.2
               90    0.1
             </tableData>
           </table>
       </product>
    </function>

    <function name="aero/moment/Pitch_elevator">
       <description>Pitch moment due to elevator</description>
       <product>
          <property>aero/qbar-psf</property>
          <property>metrics/Sw-sqft</property>
          <property>metrics/cbarw-ft</property>
          <property>fcs/elevator-pos-rad</property>
          <table>
            <independentVar lookup="row">velocities/mach</independentVar>
            <tableData>
              0.0     -1.100
              2.0     -0.475
            </tableData>
          </table>
       </product>
    </function>

    <function name="aero/moment/Pitch_damp">
       <description>Pitch moment due to pitch rate</description>
       <product>
           <property>aero/qbar-psf</property>
           <property>metrics/Sw-sqft</property>
           <property>metrics/cbarw-ft</property>
           <property>aero/ci2vel</property>
           <property>velocities/q-aero-rad_sec</property>
           <value>-12</value>
       </product>
    </function>

    <function name="aero/moment/Pitch_alphadot">
       <description>Pitch moment due to alpha rate</description>
       <product>
           <property>aero/qbar-psf</property>
           <property>metrics/Sw-sqft</property>
           <property>metrics/cbarw-ft</property>
           <property>aero/ci2vel</property>
           <property>aero/alphadot-rad_sec</property>
           <value>-7</value>
       </product>
    </function>

  </axis>

  <axis name="YAW">

    <function name="aero/moment/Yaw_beta">
       <description>Yaw moment due to beta</description>
       <product>
           <property>aero/qbar-psf</property>
           <property>metrics/Sw-sqft</property>
           <property>metrics/bw-ft</property>
           <property>aero/beta-rad</property>
           <value>0.12</value>
       </product>
    </function>

    <function name="aero/moment/Yaw_damp">
       <description>Yaw moment due to yaw rate</description>
       <product>
           <property>aero/qbar-psf</property>
           <property>metrics/Sw-sqft</property>
           <property>metrics/bw-ft</property>
           <property>aero/bi2vel</property>
           <property>velocities/r-aero-rad_sec</property>
           <value>-0.15</value>
       </product>
    </function>

    <function name="aero/moment/Yaw_rudder">
       <description>Yaw moment due to rudder</description>
       <product>
           <property>aero/qbar-psf</property>
           <property>metrics/Sw-sqft</property>
           <property>metrics/bw-ft</property>
           <property>fcs/rudder-pos-rad</property>
           <value>-0.05</value>
       </product>
    </function>

    <function name="aero/moment/Yaw_aileron">
       <description>Adverse yaw</description>
       <product>
           <property>aero/qbar-psf</property>
           <property>metrics/Sw-sqft</property>
           <property>metrics/bw-ft</property>
           <property>fcs/left-aileron-pos-rad</property>
           <value>-0.01</value>
       </product>
    </function>

  </axis>

 </aerodynamics>
 <!-- <system file="hydrodynamics"/> -->
 <system file="seamax-hydrodynamics2"/>


 <external_reactions>

  <force name="hydro-X" frame="LOCAL">
    <location unit="M">
      <x> 2.1 </x>
      <y> 0.00 </y>
      <z> 0.3   </z>
    </location>
    <direction>
      <x> 1.0 </x>
      <y> 0.0 </y>
      <z> 0.0 </z>
    </direction>
  </force>
  <force name="hydro-Y" frame="LOCAL">
    <location unit="M">
      <x> 2.1 </x>
      <y> 0.00 </y>
      <z> 0.3   </z>
    </location>
    <direction>
      <x> 0.0 </x>
      <y> 1.0 </y>
      <z> 0.0 </z>
    </direction>
  </force>
  <force name="hydro-Z" frame="LOCAL">
    <location unit="M">
      <x> 2.1 </x>
      <y> 0.00 </y>
      <z> 0.3   </z>
    </location>
    <direction>
      <x> 0.0 </x>
      <y> 0.0 </y>
      <z>-1.0 </z>
    </direction>
  </force>
  <moment name="hydro-pitch" frame="BODY" unit="LBSFT">
    <direction>
      <x> 0.0 </x>
      <y> 1.0 </y>
      <z> 0.0 </z>
    </direction>
  </moment>
  <moment name="hydro-roll" frame="BODY" unit="LBSFT">
    <direction>
      <x> 1.0 </x>
      <y> 0.0 </y>
      <z> 0.0 </z>
    </direction>
  </moment>
  <moment name="hydro-yaw" frame="BODY" unit="LBSFT">
    <direction>
      <x> 0.0 </x>
      <y> 0.0 </y>
      <z> 1.0 </z>
    </direction>
  </moment>

 </external_reactions>

</fdm_config>
